# [component: outputs s]
size := rows(s)
size = 1599
i := 0 .. size - 1
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a := 8
s1[i] :=
    res ← 0
    count ← 0
    for i1 ∈ i - a .. i + 1
        if i1 ≥ 0 and i1 < size
            res ← res + s[i1]
            count ← count + 1
    res ← res/count
    return res
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s2 := s - s1
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s2_ECG := s2
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max_positions :=
    cc ← 0
    for i2 ∈ 0 .. size - 1 - 39
        max_v ← 0
        max_pos ← i2
        for i3 ∈ i2 .. i2 + 39
            if max_v < s2[i3]
                max_v ← s2[i3]
                max_pos ← i3
        i2 ← max_pos + 15
        res[cc] ← max_pos
        cc ← cc + 1
    c1 ← 0
    for i4 ∈ 0 .. rows(res) - 2
        continue if res[i4 + 1] == res[i4]
        otherwise
            res1[c1] ← res[i4]
            c1 ← c1 + 1
    return res1
variability :=
    for i11 ∈ 0 .. rows(max_positions) - 2
        res[i11] ← max_positions[i11 + 1] - max_positions[i11]
    return res/39
variability = [
    1.02564; 0.974359; 0.974359; 0.974359; 0.974359; 1; 0.948718; 0.923077; 0.948718; 0.974359
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]
j := 0 .. rows(variability) - 1
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max_positions = [
    24; 64; 102; 140; 178; 216; 255; 292; 328; 365
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]
var_corr[j] :=
    variability[j] if variability[j] > 0.6
    (variability[j - 1] + variability[j + 1])/2 otherwise
PPGminX :=
    c ← 0
    for i ∈ 0..size - 1
        min_v ← s2[0]
        min_pos ← i
        if □ s2[i] < min_v  # error: Пустой местозаполнитель.
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for i ∈ ppg_size - 1
    max
# [component: outputs PPG]
ppg_size := rows(PPG) = 1600
i := 0 .. ppg_size - 1
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variability = [
    1.02564; 0.974359; 0.974359; 0.974359; 0.974359; 1; 0.948718; 0.923077; 0.948718; 0.974359
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]
f := cfft(PPG)  # error: Значение должно быть матрицей со скалярными элементами.
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a := 10
ii := a .. ppg_size - 1 - a
f[ii] := 0
s1 := icfft(f)
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s2[i] := (PPG[i]/Re(s1[i]) - 1)*(-1)*100  # error: Значение должно быть скаляром или матрицей.
rows(s2) =  # error: Эта переменная не определена.
rows(s2_ECG) = 1599
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mmm := max(s2)
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level := -0.1
PPGminX1 :=
    cc ← 0
    i ← 0
    while (i < size)
        if s2[i] < level
            c ← 0
            while s2[i + c] < level
                buf[c] ← s2[i]
                c ← c + 1
                break if i + c ≥ size
            trace("cc={0} ii={1},mmin={2}, res={3}", cc, ii, mmin, res)
            mmin ← min(buf)
            for ii ∈ 0 .. c - 1
                if mmin == s2[ii + i]
                    res[cc] ← ii + i
                    cc ← cc + 1
                    i ← i + c
                    break
        i ← i + 1
    return res
variabilityPPG :=
    for i11 ∈ 0 .. rows(PPGminX1) - 2
        res[i11] ← PPGminX1[i11 + 1] - PPGminX1[i11]
    return res/39
size = 1599
j := 0 .. rows(variabilityPPG) - 1
variabilityPPG[27] := (variabilityPPG[26] + variabilityPPG[28])/2  # error: Индекс массива является недопустимым для этого массива.
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variabilityPPG =  # error
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PPGminX1 =  # error
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j1 := 0 .. 12
variabilityECG2[j1] := variability[j1 + 17]
variabilityPPG2[j1] := variabilityPPG[j1 + 20]
max_positions = [
    24; 64; 102; 140; 178; 216; 255; 292; 328; 365
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]
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corr(variabilityECG2, variabilityPPG2) =  # error
j2 := 0 .. 11
variabilityPPG21[j2] := variabilityPPG2[j2 + 1]
variabilityECG21[j2] := variabilityECG2[j2]
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corr(variabilityECG21, variabilityPPG21) =  # error
j3 := 0 .. 11
variabilityECG22[j3] := variabilityECG2[j3 + 1]
variabilityPPG22[j3] := variabilityPPG2[j3]
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corr(variabilityECG22, variabilityPPG22) =  # error
